# Title: Учебный лист
# Worksheet setting: ORIGIN = 1
# Учебный лист: расход пара через сечение
D := 120
v := 0.0213
w := 35
n := 4
k := 1.15
p := 13.8
t := 545
G := D/3.6
F := G*v/w
d := sqrt(4*F/(n*π))
i := 1 .. n
x[i] := i*d
S := sum(x[j], j = 1 .. n)
f(z) := z^2 - 2
z := 1
r := root(f(z), z)
A := [2, 1; 1, 3]
b := [3; 5]
q := lsolve(A, b)
# Результаты
d =  # no stored result
r =  # no stored result
S =  # no stored result
